# Вариант 8
# Нодири Хисравхон P3431
# Дмитрий Лянгузов P3432
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λ := (5*10)^-4
t := 0, 1 .. 100000
P(t) := e^(-λ*t)
Pc(t, n) := 1 - (1 - P(t))^n
Pb(t, n) := P(t)^n
P24(t) := Pb(t, 2)
P35(t) := Pb(t, 2)
P56(t) := Pc(t, 2)
P356(t) := P(t)*P56(t)
P78(t) := Pb(t, 2)
P89(t) := Pc(t, 2)
P789(t) := P(t)*P89(t)
P1011(t) := Pb(t, 2)
P1213(t) := Pb(t, 2)
Pall_but_12(t) := 1 - (1 - P24(t))*(1 - P356(t))*(1 - P789(t))*(1 - P1011(t))*(1 - P1213(t))
Pall(t) := Pall_but_12(t)
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