Ps := 0.99
# Руотси Ян Евгеньевич P3433
# Нодири Хисравхон P3431
Pc := 0.95
P0 := 0, 0.001 .. 1
Pсист(P0) := Pc*(Ps^2*(P0*(1 - (1 - P0)^2)^2 + (1 - P0)*(1 - (1 - P0^2)^2)) + 2*Ps*(1 - Ps)*P0^2)
Pсист2(P0) := Ps^2*Pc^2*(P0*(1 - (1 - P0)^2)*(1 - (1 - (1 - (1 - P0)^2))^2) + (1 - P0)*(1 - (1 - (P0*(1 - (1 - P0)^2)))^2)) + 2*Ps^2*(1 - Pc)*Pc*(P0*(1 - (1 - P0)^2)^2 + (1 - P0)*(1 - (1 - P0^2)^2)) + 2*Ps*(1 - Ps)*Pc^2*P0*(1 - (1 - P0)^2) + 4*Ps*(1 - Ps)*Pc*(1 - Pc)*P0^2
Pсист_ст(P0) := Pсист(P0)/(5 + 2 + 2 + 5*0.5)
Pсист2_ст(P0) := Pсист2(P0)/(5 + 5 + 2 + 2 + 7*0.5)
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