# Руотси Ян Евгеньевич P3433
# Нодири Хисравхон P3431
λ := (10^-4)
μ := 1.0
Given
s0*(-λ) + μ*s4 == 0
(-λ)*s1 + λ*s2 == 0
(-λ)*s2 + λ*s3 == 0
(-λ)*s3 + λ*s4 == 0
s0 + s1 + s2 + s3 + s4 == 1
Find(s0, s1, s2, s3, s4) → [0.999600159936; 9.99600159936e-5; 9.99600159936e-5; 9.99600159936e-5; 9.99600159936e-5]
