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# Руотси Ян Евгеньевич
# Нодири Хисравхон
μ := 1
S := 1
Given
-2*λ*P2 + μ*P1 == 0
-λ*P1 + μ*P0 == 0
P0 + P1 + P2 == 1
b(λ) := Find(P0, P1, P2) → [2*λ^2/(2*λ^2 + 2*λ + 1); 2*λ/(2*λ^2 + 2*λ + 1); 1/(2*λ^2 + 2*λ + 1)]
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k1(λ) := b(λ)[2] + b(λ)[1]
C1(λ) := (2*λ*b(λ)[2] + λ*b(λ)[1])*S
a := 0.5
λ1(λ) := a*λ
λ2(λ) := (1 - a)*λ
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Given
-(2*λ1(λ) + 2*λ2(λ))*R0 + μ*R3 == 0
-(λ1(λ) + 2*λ2(λ))*R1 + 2*λ1(λ)*R0 + μ*R7 == 0
-(2*λ1(λ) + λ2(λ))*R2 + 2*λ2(λ)*R0 + μ*R8 == 0
-(λ1(λ) + λ2(λ) + μ)*R3 + λ2(λ)*R1 + λ1(λ)*R2 == 0
-(λ1(λ) + λ2(λ))*R4 + λ2(λ)*R1 + λ1(λ)*R2 == 0
-μ*R5 + λ1(λ)*R1 == 0
-μ*R6 + λ2(λ)*R2 == 0
-μ*R7 + λ1(λ)*R3 + λ1(λ)*R4 == 0
R0 + R1 + R2 + R3 + R4 + R5 + R6 + R7 + R8 == 1
f(λ) := Find(R0, R1, R2, R3, R4, R5, R6, R7, R8) → [
    1/(8.0*λ^2 + 14.0*λ + 7.0);
    (4.0*λ + 4.0)/(24.0*λ^2 + 42.0*λ + 21.0);
    (8.0*λ + 8.0)/(24.0*λ^2 + 42.0*λ + 21.0);
    2.0*λ/(8.0*λ^2 + 14.0*λ + 7.0);
    (2.0*λ + 2.0)/(8.0*λ^2 + 14.0*λ + 7.0);
    (2.0*λ^2 + 2.0*λ)/(24.0*λ^2 + 42.0*λ + 21.0);
    (4.0*λ^2 + 4.0*λ)/(24.0*λ^2 + 42.0*λ + 21.0);
    (2.0*λ^2 + λ)/(8.0*λ^2 + 14.0*λ + 7.0);
    (4.0*λ^2 + 3.0*λ)/(8.0*λ^2 + 14.0*λ + 7.0)
]
k2(λ) := f(λ)[0] + f(λ)[1] + f(λ)[2] + f(λ)[3] + f(λ)[4]
C2(λ) := (f(λ)[1]*λ + f(λ)[2]*λ + f(λ)[4]*λ)*S
# Система со сбоем компоненты:
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# Система со сбоем вычислителя/памяти:
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