# Руотси Ян Евгеньевич P3433
# Нодири Хисравхон P3431
C0 := 5
C1 := -6
C2 := -10
C3 := 0.1
t := 0.3
L := 1000
V := 0.1
b := 10^-4
λ := 0, 0.1 .. 99
n := 10
B(L) := (1 - b)^L
P(λ, n, t) := 1 - λ*V*e^((λ/n - 1/V)*t)/n
S(λ, n, t) := λ*(P(λ, n, t)*B(L)*C0 + (1 - P(λ, n, t))*B(L)*C1 + (1 - B(L))*C2) - n*C3
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P(λ, k, t) := 1 - λ*V*k*e^((k*λ/n - 1/V)*t)/n
B(k) := 1 - ((1 - (1 - b))^L)^k
S(λ, k, t) := λ*(P(λ, k, t)*B(k)*C0 + (1 - P(λ, k, t))*B(k)*C1 + (1 - B(k))*C2) - n*C3
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