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# Руотси Ян Евгеньевич
# Нодири Хисравхон
λ1 := 10^-4
μ1 := 1.0
λ2 := 2*10^-4
μ2 := 1
λ3 := (2*λ1 + λ2)/3
μ3 := (2*μ1 + μ2)/3
k := 5
n := 3*(k - 1)
Rb(n) := sum((λ3/μ3)^j*(n!/(n - j)!), j = 0 .. n)
Ri(i, n) := ((λ3/μ3)^i*(n!/(n - i)!))/Rb(n)
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γ := (1/μ3*sum(i*Ri(i, n), i = 0 .. n))^-1 = 624.167
Given
-(2*λ1 + λ2)*P0 + μ2*P5 + μ1*P8 == 0
-(λ1 + λ2)*P1 + 2*λ1*P0 == 0
-γ*P2 + λ1*P1 == 0
-γ*P3 + λ2*P0 == 0
-γ*P4 + λ2*P1 == 0
-μ2*P5 + γ*P3 == 0
-μ2*P6 + λ2*P8 + γ*P4 == 0
-μ1*P7 + λ1*P8 + γ*P2 == 0
P0 + P1 + P2 + P3 + P4 + P5 + P6 + P7 + P8 == 1
b := Find(P0, P1, P2, P3, P4, P5, P6, P7, P8) → [0.599783825606; 0.399855883737; 6.40623327594e-8; 1.92186998278e-7; 1.28124665519e-7; 0.000119956765121; 7.99951681005e-5; 3.99975840503e-5; 0.000119956765121] = [0.599784; 0.399856; 6.40623e-8; 1.92187e-7; 1.28125e-7; 0.000119957; 7.99952e-5; 3.99976e-5; 0.000119957]
Pк := b[0] + b[1] + b[8] = 0.99976
Kг := sum(combin(k, i)*Pк^i*(1 - Pк)^(k - i), i = 1 .. k) = 1
